# Created by charmm2lammps v1.9.1 on Fri May 19 16:13:17 CDT 2023
# Command: charmm2lammps.pl all36_msevb ls2 48.413 48.413 77.868 -cmap

units           real
neigh_modify    delay 2 every 1

atom_style      full
bond_style      harmonic
angle_style     charmm
dihedral_style  charmm
improper_style  harmonic

pair_style      lj/charmm/coul/long 8 12
pair_modify     mix arithmetic
kspace_style    pppm 1e-6

# Modify following line to point to the desired CMAP file
fix             cmap all cmap charmm22.cmap
fix_modify      cmap energy yes
read_data       ls2.data fix cmap crossterm CMAP

special_bonds   charmm
thermo          10
thermo_style    multi
timestep        1.0

minimize 0.0 0.0 50 200

reset_timestep  0
fix             1 all nve
fix             2 all shake 1e-6 500 0 m 1.0
velocity        all create 0.0 12345678 dist uniform

restart         500 ls2.restart1 ls2.restart2
dump            1 all atom 100 ls2.dump
dump_modify     1 image yes scale yes

thermo          100
run             1000
